// SBML level 2 version 4

model D1_LTP_time_window()

  // Compartments:
  compartment Spine = 1e-15;

  // Species:
  species GaolfGDP in Spine = 0.01008312;
  species Gbgolf in Spine = 29.88512;
  species GaolfGTP in Spine = 0.008913481;
  species D1RDAGolf in Spine = 2.008902;
  species Golf in Spine = 1453.073;
  species D1RGolf in Spine = 515.0334;
  species D1RDA in Spine = 5.959225;
  species D1R in Spine = 1476.998;
  species cAMP in Spine = 38.18601;
  species AC5 in Spine = 2.669446;
  species AC5GaolfGTP in Spine = 0.1180904;
  species PDE4 in Spine = 1506.808;
  species PKA in Spine = 1157.141;
  species PKAcAMP2 in Spine = 3.282434;
  species PKAcAMP4 in Spine = 0.08673741;
  species PKAreg in Spine = 39.48949;
  species PKAc in Spine = 3.660781;
  species PP1 in Spine = 2927.343;
  species $DA in Spine = 20;
  species $AMP in Spine = 0;
  species PDE4_cAMP in Spine = 493.1915; PDE4_cAMP is "PDE4*cAMP";
  species PDE10c in Spine = 0.5781013;
  species PDE10 in Spine = 396.4563;
  species PDE10_cAMP in Spine = 302.7817; PDE10_cAMP is "PDE10*cAMP";
  species PDE10c_cAMP in Spine = 0.1839615; PDE10c_cAMP is "PDE10c*cAMP";
  species $ATP in Spine = 5000000;
  species AC5GaolfGTP_ATP in Spine = 29.74804; AC5GaolfGTP_ATP is "AC5GaolfGTP*ATP";
  species AC5_ATP in Spine = 667.4644; AC5_ATP is "AC5*ATP";
  species PP1_Target1p in Spine = 73.65742; PP1_Target1p is "PP1*Target1p";
  species Target1p in Spine = 377.4281;
  species PKAc_Target1 in Spine = 36.82871; PKAc_Target1 is "PKAc*Target1";
  species Target1 in Spine = 2515.086;

  // Parameters:
  kGaolfGTPase = 30;
  kfPKA_2cAMP = 0.026; kfPKA_2cAMP is "kfPKA*2cAMP";
  krPKA_2cAMP = 350; krPKA_2cAMP is "krPKA*2cAMP";
  krPKAc_PKAr = 50; krPKAc_PKAr is "krPKAc*PKAr";
  kfPKAc_PKAr = 0.03; kfPKAc_PKAr is "kfPKAc*PKAr";
  kfPKA2cAMP_2cAMP = 0.0346; kfPKA2cAMP_2cAMP is "kfPKA2cAMP*2cAMP";
  krPKA2cAMP_2cAMP = 50; krPKA2cAMP_2cAMP is "krPKA2cAMP*2cAMP";
  kactGolf = 15;
  kcatPDE4_cAMP = 2.5; kcatPDE4_cAMP is "kcatPDE4*cAMP";
  kfPDE4_cAMP = 0.03; kfPDE4_cAMP is "kfPDE4*cAMP";
  krPDE4_cAMP = 1; krPDE4_cAMP is "krPDE4*cAMP";
  krPDE10_cAMP = 1; krPDE10_cAMP is "krPDE10*cAMP";
  kcatPDE10c_cAMP = 10; kcatPDE10c_cAMP is "kcatPDE10c*cAMP";
  kfPDE10_cAMP = 1e-6; kfPDE10_cAMP is "kfPDE10*cAMP";
  kfcAMP_PDE10 = 0.1; kfcAMP_PDE10 is "kfcAMP*PDE10";
  krcAMP_PDE10 = 2; krcAMP_PDE10 is "krcAMP*PDE10";
  kcatcAMP_PDE10 = 3; kcatcAMP_PDE10 is "kcatcAMP*PDE10";
  kcatAC5GaolfGTP_ATP = 50; kcatAC5GaolfGTP_ATP is "kcatAC5GaolfGTP*ATP";
  kicatAC5GaolfGTP_ATP = 2.55; kicatAC5GaolfGTP_ATP is "kicatAC5GaolfGTP*ATP";
  kcatAC5_ATP = 1; kcatAC5_ATP is "kcatAC5*ATP";
  kicatAC5_ATP = 0.002; kicatAC5_ATP is "kicatAC5*ATP";
  kfAC5_ATP = 0.0001; kfAC5_ATP is "kfAC5*ATP";
  kGolfback = 100;
  kfAC5GaolfGTP_ATP = 0.00255; kfAC5GaolfGTP_ATP is "kfAC5GaolfGTP*ATP";
  kfD1R_Golf = 0.06; kfD1R_Golf is "kfD1R*Golf";
  krD1R_Golf = 250; krD1R_Golf is "krD1R*Golf";
  kfD1RDA_Golf = 0.06; kfD1RDA_Golf is "kfD1RDA*Golf";
  krD1RDA_Golf = 250; krD1RDA_Golf is "krD1RDA*Golf";
  krAC5X_ATP = 1; krAC5X_ATP is "krAC5X*ATP";
  kfAC5XGaolfGTP = 10;
  krAC5XGaolfGTP = 1;
  krgso = 1;
  kfPDE10c_cAMP = 0.1; kfPDE10c_cAMP is "kfPDE10c*cAMP";
  krPDE10c_cAMP = 2; krPDE10c_cAMP is "krPDE10c*cAMP";
  kfD1R_DA = 0.05; kfD1R_DA is "kfD1R*DA";
  kfD1RGolf_DA = 0.05; kfD1RGolf_DA is "kfD1RGolf*DA";
  krD1R_DA = 250; krD1R_DA is "krD1R*DA";
  krD1RGolf_DA = 250; krD1RGolf_DA is "krD1RGolf*DA";
  kfPP1_Target1p = 0.001; kfPP1_Target1p is "kfPP1*Target1p";
  krPP1_Target1p = 10; krPP1_Target1p is "krPP1*Target1p";
  kfPKAc_Target1 = 0.08; kfPKAc_Target1 is "kfPKAc*Target1";
  krPKAc_Target1 = 10; krPKAc_Target1 is "krPKAc*Target1";
  kcatPP1_Target1p = 5; kcatPP1_Target1p is "kcatPP1*Target1p";
  kcatPKAc_Target1 = 10; kcatPKAc_Target1 is "kcatPKAc*Target1";

  // Reactions:
  revreaction_1: D1RGolf + $DA -> D1RDAGolf; Spine*(kfD1RGolf_DA*D1RGolf*DA - krD1RGolf_DA*D1RDAGolf);
  revreaction_2: D1R + $DA -> D1RDA; Spine*(kfD1R_DA*D1R*DA - krD1R_DA*D1RDA);
  revreaction_3: D1R + Golf -> D1RGolf; Spine*(kfD1R_Golf*D1R*Golf - krD1R_Golf*D1RGolf);
  revreaction_4: Golf + D1RDA -> D1RDAGolf; Spine*(kfD1RDA_Golf*Golf*D1RDA - krD1RDA_Golf*D1RDAGolf);
  revreaction_5: AC5 + GaolfGTP -> AC5GaolfGTP; Spine*(kfAC5XGaolfGTP*AC5*GaolfGTP - krAC5XGaolfGTP*AC5GaolfGTP);
  revreaction_6: AC5GaolfGTP + $ATP -> AC5GaolfGTP_ATP; Spine*(kfAC5GaolfGTP_ATP*AC5GaolfGTP*ATP - krAC5X_ATP*AC5GaolfGTP_ATP);
  revreaction_7: AC5 + $ATP -> AC5_ATP; Spine*(kfAC5_ATP*AC5*ATP - krAC5X_ATP*AC5_ATP);
  revreaction_8: GaolfGTP + AC5_ATP -> AC5GaolfGTP_ATP; Spine*(kfAC5XGaolfGTP*GaolfGTP*AC5_ATP - krAC5XGaolfGTP*AC5GaolfGTP_ATP);
  revreaction_9: cAMP + PDE4 -> PDE4_cAMP; Spine*(kfPDE4_cAMP*cAMP*PDE4 - krPDE4_cAMP*PDE4_cAMP);
  revreaction_10: PDE10 + 2 cAMP -> PDE10c; Spine*(kfPDE10_cAMP*PDE10*cAMP^2 - krPDE10_cAMP*PDE10c);
  revreaction_11: cAMP + PDE10 -> PDE10_cAMP; Spine*(kfcAMP_PDE10*cAMP*PDE10 - krcAMP_PDE10*PDE10_cAMP);
  revreaction_12: cAMP + PDE10c -> PDE10c_cAMP; Spine*(kfPDE10c_cAMP*cAMP*PDE10c - krPDE10c_cAMP*PDE10c_cAMP);
  revreaction_13: cAMP + PKA -> PKAcAMP2; Spine*(kfPKA_2cAMP*cAMP*PKA - krPKA_2cAMP*PKAcAMP2);
  revreaction_14: cAMP + PKAcAMP2 -> PKAcAMP4; Spine*(kfPKA2cAMP_2cAMP*cAMP*PKAcAMP2 - krPKA2cAMP_2cAMP*PKAcAMP4);
  revreaction_15: PKAcAMP4 -> PKAc + PKAreg; Spine*(krPKAc_PKAr*PKAcAMP4 - kfPKAc_PKAr*PKAc*PKAreg);
  irrevreaction_1: D1RDAGolf => Gbgolf + D1RDA + GaolfGTP; Spine*kactGolf*D1RDAGolf;
  irrevreaction_2: GaolfGTP => GaolfGDP; Spine*kGaolfGTPase*GaolfGTP;
  irrevreaction_3: GaolfGDP + Gbgolf => Golf; Spine*kGolfback*GaolfGDP*Gbgolf;
  irrevreaction_4: AC5GaolfGTP_ATP => cAMP + AC5GaolfGTP; Spine*kcatAC5GaolfGTP_ATP*AC5GaolfGTP_ATP;
  irrevreaction_5: cAMP + AC5GaolfGTP => AC5GaolfGTP_ATP; Spine*kicatAC5GaolfGTP_ATP*cAMP*AC5GaolfGTP;
  irrevreaction_6: AC5_ATP => cAMP + AC5; Spine*kcatAC5_ATP*AC5_ATP;
  irrevreaction_7: cAMP + AC5 => AC5_ATP; Spine*kicatAC5_ATP*cAMP*AC5;
  irrevreaction_8: AC5GaolfGTP => AC5 + GaolfGDP; Spine*krgso*AC5GaolfGTP;
  irrevreaction_9: AC5GaolfGTP_ATP => AC5_ATP + GaolfGDP; Spine*krgso*AC5GaolfGTP_ATP;
  irrevreaction_10: PDE4_cAMP => PDE4 + $AMP; Spine*kcatPDE4_cAMP*PDE4_cAMP;
  irrevreaction_11: PDE10_cAMP => PDE10 + $AMP; Spine*kcatcAMP_PDE10*PDE10_cAMP;
  irrevreaction_12: PDE10c_cAMP => PDE10c + $AMP; Spine*kcatPDE10c_cAMP*PDE10c_cAMP;
  revreaction_17: PP1 + Target1p -> PP1_Target1p; Spine*(kfPP1_Target1p*PP1*Target1p - krPP1_Target1p*PP1_Target1p);
  revreaction_16: Target1 + PKAc -> PKAc_Target1; Spine*(kfPKAc_Target1*Target1*PKAc - krPKAc_Target1*PKAc_Target1);
  irrevreaction_14: PKAc_Target1 => PKAc + Target1p; Spine*kcatPKAc_Target1*PKAc_Target1;
  irrevreaction_15: PP1_Target1p => PP1 + Target1; Spine*kcatPP1_Target1p*PP1_Target1p;

  // Unit definitions:
  unit substance = 1e-9 mole;
end
