// SBML level 2 version 4

model MODEL1701170001()
  // Yapo2017 - A2AR/cAMP/PKA signalling in D2 dopamine receptor expressing medium-spiny neurons
  // This model is described in the article:
  // Detection of phasic dopamine by D1 and D2 striatal medium spiny neurons.
  // Yapo C, Nair AG, Clement L, Castro LR, Hellgren Kotaleski J, Vincent P.
  // J. Physiol. (Lond.) 2017 Aug; :
  // Abstract:
  // The phasic release of dopamine in the striatum determines various aspects of reward and action selection, but the dynamics of dopamine effect on intracellular signalling remains poorly understood. We used genetically-encoded FRET biosensors in striatal brain slices to quantify the effect of transient dopamine on cAMP or PKA-dependent phosphorylation level, and computational modelling to further explore the dynamics of this signalling pathway. Medium-sized spiny neurons (MSNs), which express either D1 or D2 dopamine receptors, responded to dopamine by an increase or a decrease in cAMP, respectively. Transient dopamine showed similar sub-micromolar efficacies on cAMP in both D1 and D2 MSNs, thus challenging the commonly accepted notion that dopamine efficacy is much higher on D2 than on D1 receptors. However, in D2 MSNs, the large decrease in cAMP level triggered by transient dopamine did not translate in a decrease in PKA-dependent phosphorylation level, owing to the efficient inhibition of Protein Phosphatase 1 by DARPP-32. Simulations further suggested that D2 MSNs can also operate in a "tone-sensing" mode, allowing them to detect transient dips in basal dopamine. Overall, our results show that D2 MSNs may sense much more complex patterns of dopamine than previously thought. This article is protected by copyright. All rights reserved.
  // This model is hosted on BioModels Database and identified by: MODEL1701170001.
  // To cite BioModels Database, please use: BioModels Database: An enhanced, curated and annotated resource for published quantitative kinetic models.
  // To the extent possible under law, all copyright and related or neighbouring rights to this encoded model have been dedicated to the public domain worldwide. Please refer to CC0 Public Domain Dedication for more information.
  // biomodels.db:MODEL1701170001

  // Compartments:
  compartment D2_compatment = 1e-18;

  // Species:
  species $DA in D2_compatment;
  species D2R in D2_compatment = 724.7519;
  species D2RDA in D2_compatment = 0.000104581;
  species D2RDAGi in D2_compatment = 0.0006208645;
  species Gi in D2_compatment = 1224.74;
  species D2RGi in D2_compatment = 1775.247;
  species GaiGTP in D2_compatment = 7.96325e-5;
  species Gbgi in D2_compatment = 0.01157328;
  species A2AR in D2_compatment = 745.2913;
  species A2ARAdn in D2_compatment = 204.2607;
  species $Adn in D2_compatment = 130;
  species A2ARAdnGolf in D2_compatment = 2.088518;
  species Golf in D2_compatment = 782.4695;
  species A2ARGolf in D2_compatment = 48.35953;
  species GaolfGTP in D2_compatment = 2.172235;
  species Gbgolf in D2_compatment = 167.0824;
  species GaolfGDP in D2_compatment = 0.000999994;
  species GaiGDP in D2_compatment = 0.005364637;
  species AC5 in D2_compatment = 3.318867;
  species AC5_ATP in D2_compatment = 831.7659; AC5_ATP is "AC5*ATP";
  species $ATP in D2_compatment = 5000000;
  species cAMP in D2_compatment = 1403.927;
  species AC5GaolfGTP in D2_compatment = 0.5328493;
  species AC5GaolfGTP_ATP in D2_compatment = 164.3763; AC5GaolfGTP_ATP is "AC5GaolfGTP*ATP";
  species AC5GaiGTP in D2_compatment = 2.369808e-5;
  species AC5GaiGTP_ATP in D2_compatment = 0.006021746; AC5GaiGTP_ATP is "AC5GaiGTP*ATP";
  species AC5GaolfGTPGaiGTP in D2_compatment = 3.273582e-7;
  species AC5GaolfGTPGaiGTP_ATP in D2_compatment = 8.324071e-5; AC5GaolfGTPGaiGTP_ATP is "AC5GaolfGTPGaiGTP*ATP";
  species PDE10 in D2_compatment = 599.0951;
  species PDE10_cAMP in D2_compatment = 700.9049; PDE10_cAMP is "PDE10*cAMP";
  species $AMP in D2_compatment = 0;
  species PKA in D2_compatment = 485.1322;
  species PKAcAMP2 in D2_compatment = 50.59528;
  species PKAcAMP4 in D2_compatment = 24.15091;
  species PKAc in D2_compatment = 91.45545;
  species PKAreg in D2_compatment = 440.1216;
  species $Ca in D2_compatment = 60;
  species CaM in D2_compatment = 7612.165;
  species CaMCa2 in D2_compatment = 137.019;
  species CaMCa4 in D2_compatment = 0.8221138;
  species PP2B in D2_compatment = 0.006018388;
  species PP2BCaM in D2_compatment = 0.001527099;
  species PP2BCaMCa2 in D2_compatment = 2.748778;
  species PP2Bc in D2_compatment = 0.4947849;
  species DARPP32 in D2_compatment = 34080.77;
  species PKAc_D32 in D2_compatment = 249.3498; PKAc_D32 is "PKAc*D32";
  species D32p34 in D2_compatment = 6299.449;
  species B56PP2A in D2_compatment = 52.50238;
  species PKAc_B56PP2A in D2_compatment = 13.71894; PKAc_B56PP2A is "PKAc*B56PP2A";
  species B56PP2Ap in D2_compatment = 857.4337;
  species PP1 in D2_compatment = 0.380889;
  species PP1D32p34 in D2_compatment = 1999.492;
  species CDK5 in D2_compatment = 992.5811;
  species CDK5_D32 in D2_compatment = 507.4189; CDK5_D32 is "CDK5*D32";
  species D32p75 in D2_compatment = 4677.132;
  species PKAcD32p75 in D2_compatment = 85.54985;
  species B72PP2A in D2_compatment = 681.3766;
  species B72PPA2Ca in D2_compatment = 40.8826;
  species B56PP2Ap_D32p75 in D2_compatment = 556.9904; B56PP2Ap_D32p75 is "B56PP2Ap*D32p75";
  species B72PP2A_D32p75 in D2_compatment = 251.1834; B72PP2A_D32p75 is "B72PP2A*D32p75";
  species B72PP2ACa_D32p75 in D2_compatment = 26.55741; B72PP2ACa_D32p75 is "B72PP2ACa*D32p75";
  species B56PP2A_D32p75 in D2_compatment = 19.35453; B56PP2A_D32p75 is "B56PP2A*D32p75";
  species PP2Bc_D32p34 in D2_compatment = 1246.749; PP2Bc_D32p34 is "PP2Bc*D32p34";
  species EPAC in D2_compatment = 0;
  species EPAC_cAMP in D2_compatment = 0; EPAC_cAMP is "EPAC*cAMP";
  species AKAR3 in D2_compatment = 0.6505631;
  species PKAc_AKAR3 in D2_compatment = 0.04759803; PKAc_AKAR3 is "PKAc*AKAR3";
  species AKAR3p in D2_compatment = 2999.175;
  species PP1_AKAR3p in D2_compatment = 0.1269281; PP1_AKAR3p is "PP1*AKAR3p";
  species $totalActivePKA in D2_compatment;
  species $totalAKAR3p in D2_compatment;

  // Parameters:
  DA_basal = 0.001;
  DAdip_duration = 2;
  DAdip_maximum = DA_basal;
  DAdip_minimum = 0.001;
  DAdip_present = 0;
  DAdip_startTime = 10;
  DAdip_steepness = 100;
  DApeak_duration = 2;
  DApeak_maximum = 3000;
  DApeak_minimum = DA_basal;
  DApeak_present = 0;
  DApeak_startTime = 10;
  DApeak_steepness = 100;
  Initial_for_DA_basal = DA_basal;
  Initial_for_DAdip_duration = DAdip_duration;
  Initial_for_DAdip_maximum = DAdip_maximum;
  Initial_for_DAdip_minimum = DAdip_minimum;
  Initial_for_DAdip_present = DAdip_present;
  Initial_for_DAdip_startTime = DAdip_startTime;
  Initial_for_DAdip_steepness = DAdip_steepness;
  Initial_for_DApeak_duration = DApeak_duration;
  Initial_for_DApeak_maximum = DApeak_maximum;
  Initial_for_DApeak_minimum = DApeak_minimum;
  Initial_for_DApeak_present = DApeak_present;
  Initial_for_DApeak_startTime = DApeak_startTime;
  Initial_for_DApeak_steepness = DApeak_steepness;

  // Assignment rules:
  DAdip := Initial_for_DAdip_minimum + (Initial_for_DAdip_maximum - Initial_for_DAdip_minimum)*(1 - 1/(1 + exp(-Initial_for_DAdip_steepness*time + Initial_for_DAdip_steepness*Initial_for_DAdip_startTime)) + 1/(1 + exp(-Initial_for_DAdip_steepness*time + Initial_for_DAdip_steepness*(Initial_for_DAdip_startTime + Initial_for_DAdip_duration))));
  DApeak := Initial_for_DApeak_minimum + (Initial_for_DApeak_maximum - Initial_for_DApeak_minimum)*(1/(1 + exp(-Initial_for_DApeak_steepness*time + Initial_for_DApeak_steepness*Initial_for_DApeak_startTime)) - 1/(1 + exp(-Initial_for_DApeak_steepness*time + Initial_for_DApeak_steepness*(Initial_for_DApeak_startTime + Initial_for_DApeak_duration))));
  DA := (1 - Initial_for_DAdip_present - Initial_for_DApeak_present)*Initial_for_DA_basal + Initial_for_DAdip_present*DAdip + Initial_for_DApeak_present*DApeak;
  totalAKAR3p := AKAR3p + PP1_AKAR3p;
  totalActivePKA := PKAreg - PKAcD32p75;

  // Reactions:
  reaction_1: $DA + D2R -> D2RDA; D2_compatment*(reaction_1_k1*DA*D2R - reaction_1_k2*D2RDA);
    reaction_1_k1 = 0.0066667; reaction_1_k2 = 100;
  reaction_2: D2RDA + Gi -> D2RDAGi; D2_compatment*(reaction_2_k1*D2RDA*Gi - reaction_2_k2*D2RDAGi);
    reaction_2_k1 = 0.006; reaction_2_k2 = 0.3;
  reaction_3: D2R + Gi -> D2RGi; D2_compatment*(reaction_3_k1*D2R*Gi - reaction_3_k2*D2RGi);
    reaction_3_k1 = 0.0006; reaction_3_k2 = 0.3;
  reaction_4: $DA + D2RGi -> D2RDAGi; D2_compatment*(reaction_4_k1*DA*D2RGi - reaction_4_k2*D2RDAGi);
    reaction_4_k1 = 0.0066667; reaction_4_k2 = 10;
  reaction_5: D2RDAGi => GaiGTP + D2RDA + Gbgi; D2_compatment*reaction_5_k1*D2RDAGi;
    reaction_5_k1 = 10;
  reaction_6: A2AR + $Adn -> A2ARAdn; D2_compatment*(reaction_6_k1*A2AR*Adn - reaction_6_k2*A2ARAdn);
    reaction_6_k1 = 0.002; reaction_6_k2 = 1;
  reaction_7: Golf + A2ARAdn -> A2ARAdnGolf; D2_compatment*(reaction_7_k1*Golf*A2ARAdn - reaction_7_k2*A2ARAdnGolf);
    reaction_7_k1 = 4.2857e-5; reaction_7_k2 = 0.3;
  reaction_8: A2AR + Golf -> A2ARGolf; D2_compatment*(reaction_8_k1*A2AR*Golf - reaction_8_k2*A2ARGolf);
    reaction_8_k1 = 4.2857e-5; reaction_8_k2 = 0.3;
  reaction_9: A2ARGolf + $Adn -> A2ARAdnGolf; D2_compatment*(reaction_9_k1*A2ARGolf*Adn - reaction_9_k2*A2ARAdnGolf);
    reaction_9_k1 = 0.002; reaction_9_k2 = 1;
  reaction_10: A2ARAdnGolf => Gbgolf + A2ARAdn + GaolfGTP; D2_compatment*reaction_10_k1*A2ARAdnGolf;
    reaction_10_k1 = 8;
  reaction_11: GaolfGTP => GaolfGDP; D2_compatment*reaction_11_k1*GaolfGTP;
    reaction_11_k1 = 0.1;
  reaction_12: GaolfGDP + Gbgolf => Golf; D2_compatment*reaction_12_k1*GaolfGDP*Gbgolf;
    reaction_12_k1 = 100;
  reaction_13: GaiGTP => GaiGDP; D2_compatment*reaction_13_k1*GaiGTP;
    reaction_13_k1 = 1;
  reaction_14: Gbgi + GaiGDP => Gi; D2_compatment*reaction_14_k1*Gbgi*GaiGDP;
    reaction_14_k1 = 100;
  reaction_15: AC5 + $ATP -> AC5_ATP; D2_compatment*(reaction_15_k1*AC5*ATP - reaction_15_k2*AC5_ATP);
    reaction_15_k1 = 6.25e-5; reaction_15_k2 = 1;
  reaction_16: AC5_ATP => cAMP + AC5; D2_compatment*reaction_16_k1*AC5_ATP;
    reaction_16_k1 = 0.25;
  reaction_17: cAMP + AC5 => AC5_ATP; D2_compatment*reaction_17_k1*cAMP*AC5;
    reaction_17_k1 = 0.00052083;
  reaction_18: AC5 + GaolfGTP -> AC5GaolfGTP; D2_compatment*(reaction_18_k1*AC5*GaolfGTP - reaction_18_k2*AC5GaolfGTP);
    reaction_18_k1 = 0.1; reaction_18_k2 = 1;
  reaction_19: AC5GaolfGTP + $ATP -> AC5GaolfGTP_ATP; D2_compatment*(reaction_19_k1*AC5GaolfGTP*ATP - reaction_19_k2*AC5GaolfGTP_ATP);
    reaction_19_k1 = 0.0013; reaction_19_k2 = 1;
  reaction_20: GaolfGTP + AC5_ATP -> AC5GaolfGTP_ATP; D2_compatment*(reaction_20_k1*GaolfGTP*AC5_ATP - reaction_20_k2*AC5GaolfGTP_ATP);
    reaction_20_k1 = 0.1; reaction_20_k2 = 1;
  reaction_21: AC5GaolfGTP_ATP => cAMP + AC5GaolfGTP; D2_compatment*reaction_21_k1*AC5GaolfGTP_ATP;
    reaction_21_k1 = 25;
  reaction_22: cAMP + AC5GaolfGTP => AC5GaolfGTP_ATP; D2_compatment*reaction_22_k1*cAMP*AC5GaolfGTP;
    reaction_22_k1 = 1.0833;
  reaction_23: AC5GaolfGTP => AC5 + GaolfGDP; D2_compatment*reaction_23_k1*AC5GaolfGTP;
    reaction_23_k1 = 0.1;
  reaction_24: AC5GaolfGTP_ATP => AC5_ATP + GaolfGDP; D2_compatment*reaction_24_k1*AC5GaolfGTP_ATP;
    reaction_24_k1 = 0.1;
  reaction_25: AC5 + GaiGTP -> AC5GaiGTP; D2_compatment*(reaction_25_k1*AC5*GaiGTP - reaction_25_k2*AC5GaiGTP);
    reaction_25_k1 = 1; reaction_25_k2 = 10;
  reaction_26: $ATP + AC5GaiGTP -> AC5GaiGTP_ATP; D2_compatment*(reaction_26_k1*ATP*AC5GaiGTP - reaction_26_k2*AC5GaiGTP_ATP);
    reaction_26_k1 = 5.375e-5; reaction_26_k2 = 1;
  reaction_27: AC5_ATP + GaiGTP -> AC5GaiGTP_ATP; D2_compatment*(reaction_27_k1*AC5_ATP*GaiGTP - reaction_27_k2*AC5GaiGTP_ATP);
    reaction_27_k1 = 1; reaction_27_k2 = 10;
  reaction_28: AC5GaiGTP_ATP => AC5GaiGTP + cAMP; D2_compatment*reaction_28_k1*AC5GaiGTP_ATP;
    reaction_28_k1 = 0.075;
  reaction_29: cAMP + AC5GaiGTP => AC5GaiGTP_ATP; D2_compatment*reaction_29_k1*cAMP*AC5GaiGTP;
    reaction_29_k1 = 0.00325;
  reaction_30: AC5GaiGTP => AC5 + GaiGDP; D2_compatment*reaction_30_k1*AC5GaiGTP;
    reaction_30_k1 = 1;
  reaction_31: AC5GaiGTP_ATP => AC5_ATP + GaiGDP; D2_compatment*reaction_31_k1*AC5GaiGTP_ATP;
    reaction_31_k1 = 1;
  reaction_32: GaiGTP + AC5GaolfGTP -> AC5GaolfGTPGaiGTP; D2_compatment*(reaction_32_k1*GaiGTP*AC5GaolfGTP - reaction_32_k2*AC5GaolfGTPGaiGTP);
    reaction_32_k1 = 0.07; reaction_32_k2 = 10;
  reaction_33: GaolfGTP + AC5GaiGTP -> AC5GaolfGTPGaiGTP; D2_compatment*(reaction_33_k1*GaolfGTP*AC5GaiGTP - reaction_33_k2*AC5GaolfGTPGaiGTP);
    reaction_33_k1 = 0.007; reaction_33_k2 = 1;
  reaction_34: AC5GaolfGTP_ATP + GaiGTP -> AC5GaolfGTPGaiGTP_ATP; D2_compatment*(reaction_34_k1*AC5GaolfGTP_ATP*GaiGTP - reaction_34_k2*AC5GaolfGTPGaiGTP_ATP);
    reaction_34_k1 = 0.07; reaction_34_k2 = 10;
  reaction_35: GaolfGTP + AC5GaiGTP_ATP -> AC5GaolfGTPGaiGTP_ATP; D2_compatment*(reaction_35_k1*GaolfGTP*AC5GaiGTP_ATP - reaction_35_k2*AC5GaolfGTPGaiGTP_ATP);
    reaction_35_k1 = 0.007; reaction_35_k2 = 1;
  reaction_36: $ATP + AC5GaolfGTPGaiGTP -> AC5GaolfGTPGaiGTP_ATP; D2_compatment*(reaction_36_k1*ATP*AC5GaolfGTPGaiGTP - reaction_36_k2*AC5GaolfGTPGaiGTP_ATP);
    reaction_36_k1 = 0.000125; reaction_36_k2 = 1;
  reaction_37: AC5GaolfGTPGaiGTP => AC5GaiGTP + GaolfGDP; D2_compatment*reaction_37_k1*AC5GaolfGTPGaiGTP;
    reaction_37_k1 = 0.1;
  reaction_38: AC5GaolfGTPGaiGTP_ATP => AC5GaiGTP_ATP + GaolfGDP; D2_compatment*reaction_38_k1*AC5GaolfGTPGaiGTP_ATP;
    reaction_38_k1 = 0.1;
  reaction_39: AC5GaolfGTPGaiGTP => AC5GaolfGTP + GaiGDP; D2_compatment*reaction_39_k1*AC5GaolfGTPGaiGTP;
    reaction_39_k1 = 1;
  reaction_40: AC5GaolfGTPGaiGTP_ATP => AC5GaolfGTP_ATP + GaiGDP; D2_compatment*reaction_40_k1*AC5GaolfGTPGaiGTP_ATP;
    reaction_40_k1 = 1;
  reaction_41: AC5GaolfGTPGaiGTP_ATP => AC5GaolfGTPGaiGTP + cAMP; D2_compatment*reaction_41_k1*AC5GaolfGTPGaiGTP_ATP;
    reaction_41_k1 = 1.5;
  reaction_42: cAMP + AC5GaolfGTPGaiGTP => AC5GaolfGTPGaiGTP_ATP; D2_compatment*reaction_42_k1*cAMP*AC5GaolfGTPGaiGTP;
    reaction_42_k1 = 0.00625;
  reaction_43: cAMP + PDE10 -> PDE10_cAMP; D2_compatment*(reaction_43_k1*cAMP*PDE10 - reaction_43_k2*PDE10_cAMP);
    reaction_43_k1 = 0.005; reaction_43_k2 = 1;
  reaction_44: PDE10_cAMP => PDE10 + $AMP; D2_compatment*reaction_44_k1*PDE10_cAMP;
    reaction_44_k1 = 5;
  reaction_45: cAMP + PKA -> PKAcAMP2; D2_compatment*(reaction_45_k1*cAMP*PKA - reaction_45_k2*PKAcAMP2);
    reaction_45_k1 = 0.026; reaction_45_k2 = 350;
  reaction_46: cAMP + PKAcAMP2 -> PKAcAMP4; D2_compatment*(reaction_46_k1*cAMP*PKAcAMP2 - reaction_46_k2*PKAcAMP4);
    reaction_46_k1 = 0.034; reaction_46_k2 = 100;
  reaction_47: PKAcAMP4 -> PKAc + PKAreg; D2_compatment*(reaction_47_k1*PKAcAMP4 - reaction_47_k2*PKAc*PKAreg);
    reaction_47_k1 = 50; reaction_47_k2 = 0.03;
  reaction_48: CaM + $Ca -> CaMCa2; D2_compatment*(reaction_48_k1*CaM*Ca - reaction_48_k2*CaMCa2);
    reaction_48_k1 = 0.006; reaction_48_k2 = 20;
  reaction_49: CaMCa2 + $Ca -> CaMCa4; D2_compatment*(reaction_49_k1*CaMCa2*Ca - reaction_49_k2*CaMCa4);
    reaction_49_k1 = 0.1; reaction_49_k2 = 1000;
  reaction_50: PP2B + CaM -> PP2BCaM; D2_compatment*(reaction_50_k1*PP2B*CaM - reaction_50_k2*PP2BCaM);
    reaction_50_k1 = 0.1; reaction_50_k2 = 3000;
  reaction_51: CaMCa2 + PP2B -> PP2BCaMCa2; D2_compatment*(reaction_51_k1*CaMCa2*PP2B - reaction_51_k2*PP2BCaMCa2);
    reaction_51_k1 = 0.1; reaction_51_k2 = 0.03;
  reaction_52: CaMCa4 + PP2B -> PP2Bc; D2_compatment*(reaction_52_k1*CaMCa4*PP2B - reaction_52_k2*PP2Bc);
    reaction_52_k1 = 0.1; reaction_52_k2 = 0.001;
  reaction_53: $Ca + PP2BCaM -> PP2BCaMCa2; D2_compatment*(reaction_53_k1*Ca*PP2BCaM - reaction_53_k2*PP2BCaMCa2);
    reaction_53_k1 = 0.006; reaction_53_k2 = 0.0002;
  reaction_54: $Ca + PP2BCaMCa2 -> PP2Bc; D2_compatment*(reaction_54_k1*Ca*PP2BCaMCa2 - reaction_54_k2*PP2Bc);
    reaction_54_k1 = 0.1; reaction_54_k2 = 33.333;
  reaction_55: PKAc + DARPP32 -> PKAc_D32; D2_compatment*(reaction_55_k1*PKAc*DARPP32 - reaction_55_k2*PKAc_D32);
    reaction_55_k1 = 0.002; reaction_55_k2 = 20;
  reaction_56: PKAc_D32 => D32p34 + PKAc; D2_compatment*reaction_56_k1*PKAc_D32;
    reaction_56_k1 = 5;
  reaction_57: PKAc + B56PP2A -> PKAc_B56PP2A; D2_compatment*(reaction_57_k1*PKAc*B56PP2A - reaction_57_k2*PKAc_B56PP2A);
    reaction_57_k1 = 0.01; reaction_57_k2 = 3;
  reaction_58: PKAc_B56PP2A => B56PP2Ap + PKAc; D2_compatment*reaction_58_k1*PKAc_B56PP2A;
    reaction_58_k1 = 0.5;
  reaction_59: D32p34 + PP1 -> PP1D32p34; D2_compatment*(reaction_59_k1*D32p34*PP1 - reaction_59_k2*PP1D32p34);
    reaction_59_k1 = 1; reaction_59_k2 = 1.2;
  reaction_60: CDK5 + DARPP32 -> CDK5_D32; D2_compatment*(reaction_60_k1*CDK5*DARPP32 - reaction_60_k2*CDK5_D32);
    reaction_60_k1 = 0.0003; reaction_60_k2 = 10;
  reaction_61: CDK5_D32 => CDK5 + D32p75; D2_compatment*reaction_61_k1*CDK5_D32;
    reaction_61_k1 = 10;
  reaction_62: D32p75 + PKAc -> PKAcD32p75; D2_compatment*(reaction_62_k1*D32p75*PKAc - reaction_62_k2*PKAcD32p75);
    reaction_62_k1 = 0.002; reaction_62_k2 = 10;
  reaction_63: B72PP2A + $Ca -> B72PPA2Ca; D2_compatment*(reaction_63_k1*B72PP2A*Ca - reaction_63_k2*B72PPA2Ca);
    reaction_63_k1 = 0.01; reaction_63_k2 = 10;
  reaction_64: B56PP2Ap + D32p75 -> B56PP2Ap_D32p75; D2_compatment*(reaction_64_k1*B56PP2Ap*D32p75 - reaction_64_k2*B56PP2Ap_D32p75);
    reaction_64_k1 = 0.015; reaction_64_k2 = 100;
  reaction_65: B56PP2Ap_D32p75 => B56PP2Ap + DARPP32; D2_compatment*reaction_65_k1*B56PP2Ap_D32p75;
    reaction_65_k1 = 8;
  reaction_66: B72PP2A + D32p75 -> B72PP2A_D32p75; D2_compatment*(reaction_66_k1*B72PP2A*D32p75 - reaction_66_k2*B72PP2A_D32p75);
    reaction_66_k1 = 0.008; reaction_66_k2 = 100;
  reaction_67: B72PP2A_D32p75 => B72PP2A + DARPP32; D2_compatment*reaction_67_k1*B72PP2A_D32p75;
    reaction_67_k1 = 1.5;
  reaction_68: D32p75 + B72PPA2Ca -> B72PP2ACa_D32p75; D2_compatment*(reaction_68_k1*D32p75*B72PPA2Ca - reaction_68_k2*B72PP2ACa_D32p75);
    reaction_68_k1 = 0.015; reaction_68_k2 = 100;
  reaction_69: B72PP2ACa_D32p75 => B72PPA2Ca + DARPP32; D2_compatment*reaction_69_k1*B72PP2ACa_D32p75;
    reaction_69_k1 = 8;
  reaction_70: D32p75 + B56PP2A -> B56PP2A_D32p75; D2_compatment*(reaction_70_k1*D32p75*B56PP2A - reaction_70_k2*B56PP2A_D32p75);
    reaction_70_k1 = 0.008; reaction_70_k2 = 100;
  reaction_71: B56PP2A_D32p75 => B56PP2A + DARPP32; D2_compatment*reaction_71_k1*B56PP2A_D32p75;
    reaction_71_k1 = 1.5;
  reaction_72: D32p34 + PP2Bc -> PP2Bc_D32p34; D2_compatment*(reaction_72_k1*D32p34*PP2Bc - reaction_72_k2*PP2Bc_D32p34);
    reaction_72_k1 = 0.8; reaction_72_k2 = 1;
  reaction_73: PP2Bc_D32p34 => DARPP32 + PP2Bc; D2_compatment*reaction_73_k1*PP2Bc_D32p34;
    reaction_73_k1 = 1;
  reaction_74: B56PP2Ap => B56PP2A; D2_compatment*reaction_74_k1*B56PP2Ap;
    reaction_74_k1 = 0.008;
  reaction_75: EPAC + cAMP -> EPAC_cAMP; D2_compatment*(reaction_75_k1*EPAC*cAMP - reaction_75_k2*EPAC_cAMP);
    reaction_75_k1 = 2.2e-5; reaction_75_k2 = 0.1;
  reaction_76: AKAR3 + PKAc -> PKAc_AKAR3; D2_compatment*(reaction_76_k1*AKAR3*PKAc - reaction_76_k2*PKAc_AKAR3);
    reaction_76_k1 = 0.004; reaction_76_k2 = 1;
  reaction_77: PKAc_AKAR3 => PKAc + AKAR3p; D2_compatment*reaction_77_k1*PKAc_AKAR3;
    reaction_77_k1 = 4;
  reaction_78: PP1 + AKAR3p -> PP1_AKAR3p; D2_compatment*(reaction_78_k1*PP1*AKAR3p - reaction_78_k2*PP1_AKAR3p);
    reaction_78_k1 = 0.0005; reaction_78_k2 = 3;
  reaction_79: PP1_AKAR3p => PP1 + AKAR3; D2_compatment*reaction_79_k1*PP1_AKAR3p;
    reaction_79_k1 = 1.5;

  // Unit definitions:
  unit substance = 1e-9 mole;
end
