// SBML level 2 version 4

model MODEL1701170000()
  // Yapo2017- cAMP/PKA signalling in D1 dopamine receptor expressing medium-spiny neurons
  // This model is described in the article:
  // Detection of phasic dopamine by D1 and D2 striatal medium spiny neurons.
  // Yapo C, Nair AG, Clement L, Castro LR, Hellgren Kotaleski J, Vincent P.
  // J. Physiol. (Lond.) 2017 Aug; :
  // Abstract:
  // The phasic release of dopamine in the striatum determines various aspects of reward and action selection, but the dynamics of dopamine effect on intracellular signalling remains poorly understood. We used genetically-encoded FRET biosensors in striatal brain slices to quantify the effect of transient dopamine on cAMP or PKA-dependent phosphorylation level, and computational modelling to further explore the dynamics of this signalling pathway. Medium-sized spiny neurons (MSNs), which express either D1 or D2 dopamine receptors, responded to dopamine by an increase or a decrease in cAMP, respectively. Transient dopamine showed similar sub-micromolar efficacies on cAMP in both D1 and D2 MSNs, thus challenging the commonly accepted notion that dopamine efficacy is much higher on D2 than on D1 receptors. However, in D2 MSNs, the large decrease in cAMP level triggered by transient dopamine did not translate in a decrease in PKA-dependent phosphorylation level, owing to the efficient inhibition of Protein Phosphatase 1 by DARPP-32. Simulations further suggested that D2 MSNs can also operate in a "tone-sensing" mode, allowing them to detect transient dips in basal dopamine. Overall, our results show that D2 MSNs may sense much more complex patterns of dopamine than previously thought. This article is protected by copyright. All rights reserved.
  // This model is hosted on BioModels Database and identified by: MODEL1701170000.
  // To cite BioModels Database, please use: BioModels Database: An enhanced, curated and annotated resource for published quantitative kinetic models.
  // To the extent possible under law, all copyright and related or neighbouring rights to this encoded model have been dedicated to the public domain worldwide. Please refer to CC0 Public Domain Dedication for more information.
  // biomodels.db:MODEL1701170000

  // Compartments:
  compartment D1_compatment = 1e-18;

  // Species:
  species GaolfGDP in D1_compatment = 0.0004475062;
  species Gbgolf in D1_compatment = 0.0008099752;
  species GaolfGTP in D1_compatment = 3.943778e-6;
  species D1RDAGolf in D1_compatment = 4.530862e-6;
  species Golf in D1_compatment = 1339.39;
  species D1RGolf in D1_compatment = 160.6095;
  species D1RDA in D1_compatment = 4.546914e-5;
  species D1R in D1_compatment = 839.3905;
  species cAMP in D1_compatment = 47.7852;
  species $Ca in D1_compatment = 60;
  species AC5 in D1_compatment = 3.983746;
  species AC5GaolfGTP in D1_compatment = 1.417149e-6;
  species CaM in D1_compatment = 5411.027;
  species CaMCa2 in D1_compatment = 97.39849;
  species CaMCa4 in D1_compatment = 0.5843909;
  species PKA in D1_compatment = 965.4761;
  species PKAcAMP2 in D1_compatment = 3.427221;
  species PKAcAMP4 in D1_compatment = 0.055734;
  species PKAreg in D1_compatment = 31.04092;
  species PKAc in D1_compatment = 2.998091;
  species PP2B in D1_compatment = 9.010237;
  species PP2Bc in D1_compatment = 526.5536;
  species PP2BCaM in D1_compatment = 1.625155;
  species PP2BCaMCa2 in D1_compatment = 2925.274;
  species DARPP32 in D1_compatment = 31531.27;
  species PKAc_D32 in D1_compatment = 7.562385; PKAc_D32 is "PKAc*D32";
  species D32p34 in D1_compatment = 0.1783135;
  species B72PP2A in D1_compatment = 737.5616;
  species PKAc_B56PP2A in D1_compatment = 4.076793; PKAc_B56PP2A is "PKAc*B56PP2A";
  species B56PP2Ap in D1_compatment = 101.8252;
  species CDK5 in D1_compatment = 1018.361;
  species PP1 in D1_compatment = 1725.417;
  species CDK5_D32 in D1_compatment = 481.6393; CDK5_D32 is "CDK5*D32";
  species D32p75 in D1_compatment = 15839.76;
  species PKAcD32p75 in D1_compatment = 9.49921;
  species B72PPA2Ca in D1_compatment = 44.25652;
  species B56PP2Ap_D32p75 in D1_compatment = 224.0053; B56PP2Ap_D32p75 is "B56PP2Ap*D32p75";
  species B72PP2A_D32p75 in D1_compatment = 920.8183; B72PP2A_D32p75 is "B72PP2A*D32p75";
  species B72PP2ACa_D32p75 in D1_compatment = 97.36353; B72PP2ACa_D32p75 is "B72PP2ACa*D32p75";
  species PP1D32p34 in D1_compatment = 256.1915;
  species PP2Bc_D32p34 in D1_compatment = 37.53705; PP2Bc_D32p34 is "PP2Bc*D32p34";
  species $DA in D1_compatment;
  species $AMP in D1_compatment = 0;
  species B56PP2A in D1_compatment = 475.9189;
  species B56PP2A_D32p75 in D1_compatment = 594.1739; B56PP2A_D32p75 is "B56PP2A*D32p75";
  species PDE10 in D1_compatment = 1250.215;
  species PDE10_cAMP in D1_compatment = 49.78482; PDE10_cAMP is "PDE10*cAMP";
  species $ATP in D1_compatment = 5000000;
  species AC5GaolfGTP_ATP in D1_compatment = 0.000357108; AC5GaolfGTP_ATP is "AC5GaolfGTP*ATP";
  species AC5_ATP in D1_compatment = 996.0159; AC5_ATP is "AC5*ATP";
  species $totalActivePKA in D1_compatment;
  species $totalActivePP1 in D1_compatment;
  species AKAR3 in D1_compatment = 2878.77;
  species AKAR3p in D1_compatment = 95.93406;
  species PP1_AKAR3p in D1_compatment = 18.39118; PP1_AKAR3p is "PP1*AKAR3p";
  species PKAc_AKAR3 in D1_compatment = 6.904443; PKAc_AKAR3 is "PKAc*AKAR3";
  species $totalAKAR3p in D1_compatment;
  species EPAC_cAMP in D1_compatment = 0; EPAC_cAMP is "EPAC*cAMP";
  species EPAC in D1_compatment = 0;

  // Parameters:
  DA_basal = 0.001;
  DAdip_duration = 2;
  DAdip_maximum = DA_basal;
  DAdip_minimum = 0.001;
  DAdip_present = 0;
  DAdip_startTime = 10;
  DAdip_steepness = 100;
  DApeak_duration = 2;
  DApeak_maximum = 3000;
  DApeak_minimum = DA_basal;
  DApeak_present = 0;
  DApeak_startTime = 10;
  DApeak_steepness = 100;
  Initial_for_DA_basal = DA_basal;
  Initial_for_DAdip_duration = DAdip_duration;
  Initial_for_DAdip_maximum = DAdip_maximum;
  Initial_for_DAdip_minimum = DAdip_minimum;
  Initial_for_DAdip_present = DAdip_present;
  Initial_for_DAdip_startTime = DAdip_startTime;
  Initial_for_DAdip_steepness = DAdip_steepness;
  Initial_for_DApeak_duration = DApeak_duration;
  Initial_for_DApeak_maximum = DApeak_maximum;
  Initial_for_DApeak_minimum = DApeak_minimum;
  Initial_for_DApeak_present = DApeak_present;
  Initial_for_DApeak_startTime = DApeak_startTime;
  Initial_for_DApeak_steepness = DApeak_steepness;

  // Assignment rules:
  totalActivePKA := PKAreg - PKAcD32p75;
  totalAKAR3p := PP1_AKAR3p + AKAR3p;
  totalActivePP1 := PP1 + PP1_AKAR3p;
  DAdip := Initial_for_DAdip_minimum + (Initial_for_DAdip_maximum - Initial_for_DAdip_minimum)*(1 - 1/(1 + exp(-Initial_for_DAdip_steepness*time + Initial_for_DAdip_steepness*Initial_for_DAdip_startTime)) + 1/(1 + exp(-Initial_for_DAdip_steepness*time + Initial_for_DAdip_steepness*(Initial_for_DAdip_startTime + Initial_for_DAdip_duration))));
  DApeak := Initial_for_DApeak_minimum + (Initial_for_DApeak_maximum - Initial_for_DApeak_minimum)*(1/(1 + exp(-Initial_for_DApeak_steepness*time + Initial_for_DApeak_steepness*Initial_for_DApeak_startTime)) - 1/(1 + exp(-Initial_for_DApeak_steepness*time + Initial_for_DApeak_steepness*(Initial_for_DApeak_startTime + Initial_for_DApeak_duration))));
  DA := (1 - Initial_for_DAdip_present - Initial_for_DApeak_present)*Initial_for_DA_basal + Initial_for_DAdip_present*DAdip + Initial_for_DApeak_present*DApeak;

  // Reactions:
  reaction_1: D1R + $DA -> D1RDA; D1_compatment*(reaction_1_k1*D1R*DA - reaction_1_k2*D1RDA);
    reaction_1_k1 = 0.0005; reaction_1_k2 = 10;
  reaction_2: Golf + D1RDA -> D1RDAGolf; D1_compatment*(reaction_2_k1*Golf*D1RDA - reaction_2_k2*D1RDAGolf);
    reaction_2_k1 = 4.2857e-5; reaction_2_k2 = 0.3;
  reaction_3: D1R + Golf -> D1RGolf; D1_compatment*(reaction_3_k1*D1R*Golf - reaction_3_k2*D1RGolf);
    reaction_3_k1 = 4.2857e-5; reaction_3_k2 = 0.3;
  reaction_4: D1RGolf + $DA -> D1RDAGolf; D1_compatment*(reaction_4_k1*D1RGolf*DA - reaction_4_k2*D1RDAGolf);
    reaction_4_k1 = 0.0005; reaction_4_k2 = 10;
  reaction_5: D1RDAGolf => Gbgolf + D1RDA + GaolfGTP; D1_compatment*reaction_5_k1*D1RDAGolf;
    reaction_5_k1 = 8;
  reaction_6: GaolfGTP => GaolfGDP; D1_compatment*reaction_6_k1*GaolfGTP;
    reaction_6_k1 = 0.1;
  reaction_7: GaolfGDP + Gbgolf => Golf; D1_compatment*reaction_7_k1*GaolfGDP*Gbgolf;
    reaction_7_k1 = 100;
  reaction_8: AC5 + $ATP -> AC5_ATP; D1_compatment*(reaction_8_k1*AC5*ATP - reaction_8_k2*AC5_ATP);
    reaction_8_k1 = 6.25e-5; reaction_8_k2 = 1;
  reaction_9: AC5_ATP => cAMP + AC5; D1_compatment*reaction_9_k1*AC5_ATP;
    reaction_9_k1 = 0.25;
  reaction_10: cAMP + AC5 => AC5_ATP; D1_compatment*reaction_10_k1*cAMP*AC5;
    reaction_10_k1 = 0.00052083;
  reaction_11: AC5 + GaolfGTP -> AC5GaolfGTP; D1_compatment*(reaction_11_k1*AC5*GaolfGTP - reaction_11_k2*AC5GaolfGTP);
    reaction_11_k1 = 0.1; reaction_11_k2 = 1;
  reaction_12: AC5GaolfGTP + $ATP -> AC5GaolfGTP_ATP; D1_compatment*(reaction_12_k1*AC5GaolfGTP*ATP - reaction_12_k2*AC5GaolfGTP_ATP);
    reaction_12_k1 = 0.0013; reaction_12_k2 = 1;
  reaction_13: GaolfGTP + AC5_ATP -> AC5GaolfGTP_ATP; D1_compatment*(reaction_13_k1*GaolfGTP*AC5_ATP - reaction_13_k2*AC5GaolfGTP_ATP);
    reaction_13_k1 = 0.1; reaction_13_k2 = 1;
  reaction_14: AC5GaolfGTP_ATP => cAMP + AC5GaolfGTP; D1_compatment*reaction_14_k1*AC5GaolfGTP_ATP;
    reaction_14_k1 = 25;
  reaction_15: cAMP + AC5GaolfGTP => AC5GaolfGTP_ATP; D1_compatment*reaction_15_k1*cAMP*AC5GaolfGTP;
    reaction_15_k1 = 1.0833;
  reaction_16: AC5GaolfGTP => AC5 + GaolfGDP; D1_compatment*reaction_16_k1*AC5GaolfGTP;
    reaction_16_k1 = 0.1;
  reaction_17: AC5GaolfGTP_ATP => AC5_ATP + GaolfGDP; D1_compatment*reaction_17_k1*AC5GaolfGTP_ATP;
    reaction_17_k1 = 0.1;
  reaction_18: cAMP + PDE10 -> PDE10_cAMP; D1_compatment*(reaction_18_k1*cAMP*PDE10 - reaction_18_k2*PDE10_cAMP);
    reaction_18_k1 = 0.005; reaction_18_k2 = 1;
  reaction_19: PDE10_cAMP => PDE10 + $AMP; D1_compatment*reaction_19_k1*PDE10_cAMP;
    reaction_19_k1 = 5;
  reaction_20: cAMP + PKA -> PKAcAMP2; D1_compatment*(reaction_20_k1*cAMP*PKA - reaction_20_k2*PKAcAMP2);
    reaction_20_k1 = 0.026; reaction_20_k2 = 350;
  reaction_21: cAMP + PKAcAMP2 -> PKAcAMP4; D1_compatment*(reaction_21_k1*cAMP*PKAcAMP2 - reaction_21_k2*PKAcAMP4);
    reaction_21_k1 = 0.034; reaction_21_k2 = 100;
  reaction_22: PKAcAMP4 -> PKAc + PKAreg; D1_compatment*(reaction_22_k1*PKAcAMP4 - reaction_22_k2*PKAc*PKAreg);
    reaction_22_k1 = 50; reaction_22_k2 = 0.03;
  reaction_23: CaM + $Ca -> CaMCa2; D1_compatment*(reaction_23_k1*CaM*Ca - reaction_23_k2*CaMCa2);
    reaction_23_k1 = 0.006; reaction_23_k2 = 20;
  reaction_24: CaMCa2 + $Ca -> CaMCa4; D1_compatment*(reaction_24_k1*CaMCa2*Ca - reaction_24_k2*CaMCa4);
    reaction_24_k1 = 0.1; reaction_24_k2 = 1000;
  reaction_25: PP2B + CaM -> PP2BCaM; D1_compatment*(reaction_25_k1*PP2B*CaM - reaction_25_k2*PP2BCaM);
    reaction_25_k1 = 0.1; reaction_25_k2 = 3000;
  reaction_26: CaMCa2 + PP2B -> PP2BCaMCa2; D1_compatment*(reaction_26_k1*CaMCa2*PP2B - reaction_26_k2*PP2BCaMCa2);
    reaction_26_k1 = 0.1; reaction_26_k2 = 0.03;
  reaction_27: CaMCa4 + PP2B -> PP2Bc; D1_compatment*(reaction_27_k1*CaMCa4*PP2B - reaction_27_k2*PP2Bc);
    reaction_27_k1 = 0.1; reaction_27_k2 = 0.001;
  reaction_28: $Ca + PP2BCaM -> PP2BCaMCa2; D1_compatment*(reaction_28_k1*Ca*PP2BCaM - reaction_28_k2*PP2BCaMCa2);
    reaction_28_k1 = 0.006; reaction_28_k2 = 0.0002;
  reaction_29: $Ca + PP2BCaMCa2 -> PP2Bc; D1_compatment*(reaction_29_k1*Ca*PP2BCaMCa2 - reaction_29_k2*PP2Bc);
    reaction_29_k1 = 0.1; reaction_29_k2 = 33.333;
  reaction_30: PKAc + DARPP32 -> PKAc_D32; D1_compatment*(reaction_30_k1*PKAc*DARPP32 - reaction_30_k2*PKAc_D32);
    reaction_30_k1 = 0.002; reaction_30_k2 = 20;
  reaction_31: PKAc_D32 => D32p34 + PKAc; D1_compatment*reaction_31_k1*PKAc_D32;
    reaction_31_k1 = 5;
  reaction_32: PKAc + B56PP2A -> PKAc_B56PP2A; D1_compatment*(reaction_32_k1*PKAc*B56PP2A - reaction_32_k2*PKAc_B56PP2A);
    reaction_32_k1 = 0.01; reaction_32_k2 = 3;
  reaction_33: PKAc_B56PP2A => B56PP2Ap + PKAc; D1_compatment*reaction_33_k1*PKAc_B56PP2A;
    reaction_33_k1 = 0.5;
  reaction_34: D32p34 + PP1 -> PP1D32p34; D1_compatment*(reaction_34_k1*D32p34*PP1 - reaction_34_k2*PP1D32p34);
    reaction_34_k1 = 1; reaction_34_k2 = 1.2;
  reaction_35: CDK5 + DARPP32 -> CDK5_D32; D1_compatment*(reaction_35_k1*CDK5*DARPP32 - reaction_35_k2*CDK5_D32);
    reaction_35_k1 = 0.0003; reaction_35_k2 = 10;
  reaction_36: CDK5_D32 => CDK5 + D32p75; D1_compatment*reaction_36_k1*CDK5_D32;
    reaction_36_k1 = 10;
  reaction_37: D32p75 + PKAc -> PKAcD32p75; D1_compatment*(reaction_37_k1*D32p75*PKAc - reaction_37_k2*PKAcD32p75);
    reaction_37_k1 = 0.002; reaction_37_k2 = 10;
  reaction_38: B72PP2A + $Ca -> B72PPA2Ca; D1_compatment*(reaction_38_k1*B72PP2A*Ca - reaction_38_k2*B72PPA2Ca);
    reaction_38_k1 = 0.01; reaction_38_k2 = 10;
  reaction_39: B56PP2Ap + D32p75 -> B56PP2Ap_D32p75; D1_compatment*(reaction_39_k1*B56PP2Ap*D32p75 - reaction_39_k2*B56PP2Ap_D32p75);
    reaction_39_k1 = 0.015; reaction_39_k2 = 100;
  reaction_40: B56PP2Ap_D32p75 => B56PP2Ap + DARPP32; D1_compatment*reaction_40_k1*B56PP2Ap_D32p75;
    reaction_40_k1 = 8;
  reaction_41: B72PP2A + D32p75 -> B72PP2A_D32p75; D1_compatment*(reaction_41_k1*B72PP2A*D32p75 - reaction_41_k2*B72PP2A_D32p75);
    reaction_41_k1 = 0.008; reaction_41_k2 = 100;
  reaction_42: B72PP2A_D32p75 => B72PP2A + DARPP32; D1_compatment*reaction_42_k1*B72PP2A_D32p75;
    reaction_42_k1 = 1.5;
  reaction_43: D32p75 + B72PPA2Ca -> B72PP2ACa_D32p75; D1_compatment*(reaction_43_k1*D32p75*B72PPA2Ca - reaction_43_k2*B72PP2ACa_D32p75);
    reaction_43_k1 = 0.015; reaction_43_k2 = 100;
  reaction_44: B72PP2ACa_D32p75 => B72PPA2Ca + DARPP32; D1_compatment*reaction_44_k1*B72PP2ACa_D32p75;
    reaction_44_k1 = 8;
  reaction_45: D32p75 + B56PP2A -> B56PP2A_D32p75; D1_compatment*(reaction_45_k1*D32p75*B56PP2A - reaction_45_k2*B56PP2A_D32p75);
    reaction_45_k1 = 0.008; reaction_45_k2 = 100;
  reaction_46: B56PP2A_D32p75 => B56PP2A + DARPP32; D1_compatment*reaction_46_k1*B56PP2A_D32p75;
    reaction_46_k1 = 1.5;
  reaction_47: D32p34 + PP2Bc -> PP2Bc_D32p34; D1_compatment*(reaction_47_k1*D32p34*PP2Bc - reaction_47_k2*PP2Bc_D32p34);
    reaction_47_k1 = 0.8; reaction_47_k2 = 1;
  reaction_48: PP2Bc_D32p34 => DARPP32 + PP2Bc; D1_compatment*reaction_48_k1*PP2Bc_D32p34;
    reaction_48_k1 = 1;
  reaction_49: B56PP2Ap => B56PP2A; D1_compatment*reaction_49_k1*B56PP2Ap;
    reaction_49_k1 = 0.008;
  reaction_50: EPAC + cAMP -> EPAC_cAMP; D1_compatment*(reaction_50_k1*EPAC*cAMP - reaction_50_k2*EPAC_cAMP);
    reaction_50_k1 = 2.2e-5; reaction_50_k2 = 0.1;
  reaction_51: AKAR3 + PKAc -> PKAc_AKAR3; D1_compatment*(reaction_51_k1*AKAR3*PKAc - reaction_51_k2*PKAc_AKAR3);
    reaction_51_k1 = 0.004; reaction_51_k2 = 1;
  reaction_52: PKAc_AKAR3 => PKAc + AKAR3p; D1_compatment*reaction_52_k1*PKAc_AKAR3;
    reaction_52_k1 = 4;
  reaction_53: PP1 + AKAR3p -> PP1_AKAR3p; D1_compatment*(reaction_53_k1*PP1*AKAR3p - reaction_53_k2*PP1_AKAR3p);
    reaction_53_k1 = 0.0005; reaction_53_k2 = 3;
  reaction_54: PP1_AKAR3p => PP1 + AKAR3; D1_compatment*reaction_54_k1*PP1_AKAR3p;
    reaction_54_k1 = 1.5;

  // Unit definitions:
  unit substance = 1e-9 mole;
end
